// SBML level 3 version 1

model resalloc1()

  // Compartments:
  compartment default_compartment = 1;

  // Species:
  species N1 in default_compartment = 10;
  species N2 in default_compartment = 10;
  species N in default_compartment = 0;
  species ATP in default_compartment = 0;
  species AA in default_compartment = 0;
  species Etrans1 in default_compartment = 1e-5; Etrans1 is "Transporter enzyme";
  species Etrans2 in default_compartment = 1e-5; Etrans2 is "Cofactor of transporter enzyme";
  species Emetab1 in default_compartment = 1e-5; Emetab1 is "Generic metabolic enzyme";
  species Emetab2 in default_compartment = 1e-5; Emetab2 is "Specialized metabolic enzyme";
  species R in default_compartment = 1e-6; R is "Ribosome";
  species S in default_compartment = 0.001; S is "Structrual biomass component";
  species Etrans12 in default_compartment; Etrans12 is "Transporter complex";

  // Parameters:
  kcatt = 1800;
  kcat1 = 2000;
  kcat2 = 2500;

  // Reactions:
  Trans1: N1 -> N; kcatt;
  Trans2: N2 -> N; kcatt;
  Metab1: 200 AA + 900 ATP -> Emetab1; 5;
  Metab2: 160 AA + 720 ATP -> Emetab2; 6.25;
  Biotrans1: 100 AA + 450 ATP -> Etrans1; 10;
  Biotrans2: 60 AA + 270 ATP -> Etrans2; 6;
  PR: 1000 AA + 45000 ATP -> R; 1; PR is "Ribosome expression";
  PS: 100 AA + 250 ATP -> S; 10; PS is "Structural biomass production";
  CF1: Etrans1 + Etrans2 -> Etrans12; ;
end
