// SBML level 3 version 1

model resalloc1()

  // Compartments:
  compartment default_compartment = 1;
  compartment external;
  compartment metabolites;
  compartment biomass_products;

  // Species:
  species N1 in external = 10;
  species N2 in external = 10;
  species N in metabolites = 0;
  species ATP in metabolites = 0;
  species AA in metabolites = 0;
  species Etrans1 in biomass_products = 1e-5; Etrans1 is "Transporter enzyme";
  species Etrans2 in biomass_products = 1e-5; Etrans2 is "Cofactor of transporter enzyme";
  species Emetab1 in biomass_products = 1e-5; Emetab1 is "Generic metabolic enzyme";
  species Emetab2 in biomass_products = 1e-5; Emetab2 is "Specialized metabolic enzyme";
  species R in biomass_products = 1e-6; R is "Ribosome";
  species S in biomass_products = 0.001; S is "Structrual biomass component";
  species Complex_1 in biomass_products; Complex_1 is "Transporter complex";

  // Parameters:
  kcatt = 1800;
  kcat1 = 2000;
  kcat2 = 2500;
  zero = 0;
  kcatR1 = 10;
  kcatR2 = 16.67;
  kcatR3 = 5;
  kcatR4 = 6.25;
  kcatR5 = 1;
  kcatR6 = 10;
  kcatC1 = 6.25;

  // Reactions:
  // GENE_ASSOCIATION: Etrans1
  Trans1: N1 -> N; kcatt;
  // GENE_ASSOCIATION: (Etrans1 AND Etrans2)
  Trans2: N2 -> N; kcatt;
  // GENE_ASSOCIATION: Emetab1
  Metab1_1: N => AA + ATP; kcat1;
  // GENE_ASSOCIATION: Emetab2
  Metab1_2: N => AA + ATP; kcat2;
  // GENE_ASSOCIATION: Emetab1
  Metab2: N => AA + 2 ATP; kcat1;
  // GENE_ASSOCIATION: R
  Biotrans1: 100 AA + 450 ATP => Etrans1; 10;
  // GENE_ASSOCIATION: R
  Biotrans2: 60 AA + 270 ATP => Etrans2; 16.67;
  // GENE_ASSOCIATION: R
  Biotrans1_AND_Biotrans2: 160 AA + 720 ATP => Complex_1; 6.25;
  // GENE_ASSOCIATION: R
  PMetab1: 200 AA + 900 ATP => Emetab1; 5;
  // GENE_ASSOCIATION: R
  PMetab2: 160 AA + 720 ATP => Emetab2; 6.25;
  // GENE_ASSOCIATION: R
  PR: 1000 AA + 45000 ATP => R; 1; PR is "Ribosome expression";
  // GENE_ASSOCIATION: R
  PS: 100 AA + 250 ATP => S; 10; PS is "Structural biomass production";
end
